# Входное напряжение
Uin := 12 V
# АЦП HX711
# Цифровое питание АЦП
Iadc_d := 100 μA
# Аналоговое питание АЦП
Iadc_a := 1400*μA
# Тензодатчик NA2
# Потребление тензодатчика
Isens := 14.2*mA
# Входное полное сопротивление
Rs_in := 410 Ω
# DC-DC PDS1-S12-S9-M-TR
# Макс. вых. ток
Idc_out_max := 111 mA
# Мин. вых. ток
Idc_out_min := 12 mA
# LDO XC6204B502MR-G
# Макс. вых. ток
Ildo_out_max := 150 mA
# Выходное напряжение
Uldo_out := 5 V
# Мин. вых. напряжение
Uldo_out_min := 0.97*Uldo_out = 4.85 V
# Макс. вых. напряжение
Uldo_out_max := 1.03*Uldo_out = 5.15 V
# Максимальное падение напряжения при нагрузке 30мА
Vldo_dropout_max := 90 mV
# Макс. изм. вых.напряжения от изм. тока нагрузки в диапазоне раб. температур
ΔVldo_out_max := 80 mV
# Макс. потребляемый ток
Ildo_in_max := 120 μA
# Выходной шум
Vldo_noise := 30 μV
